*HEADING
simple tension, Ogden, incompressible, mullins effect
with plasticity; Uniaxial and biaxial test data for input
*Preprint, Model=yes
*NODE,NSET=one
1,
2,1.
3,1.,1.,
4,0.,1.,
5,0.,0.,1.
6,1.,0.,1.
7,1.,1.,1.
8,0.,1.,1.
*nset,nset=nx0
1,4,5,8
*nset,nset=ny0
1,2,5,6
*nset,nset=nz0
1,2,3,4
*nset,nset=nx1
2,3,6,7
*nset,nset=nrf1
1
*nset,nset=nu1
2
*ELEMENT,TYPE=C3D8H,ELSET=ONE
1,1,2,3,4,5,6,7,8
*SOLID SECTION,ELSET=ONE,MATERIAL=epdm
*MATERIAL,NAME=epdm
*HYPERELASTIC,marlow
*Uniaxial Test Data
       0.,        0.
 0.079199,  0.001036
 0.144411,  0.003734
 0.183326,  0.006788
 0.211147,  0.009614
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  2.70026,  0.709657
*Mullins Effect, TEST DATA INPUT, beta=0.1
*Uniaxial Test Data
   2.70026,   0.709657
   2.57597,   0.707732
   2.48716,   0.706306
   2.41284,   0.704138
   2.34581,   0.703077
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 0.0295047,  0.0070206
*Uniaxial Test Data
   1.08038,   0.220582
   1.01235,   0.218852
  0.962934,   0.216267
   0.91986,   0.214294
  0.883038,   0.211367
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 0.0282126, 0.00018269
*Uniaxial Test Data
  0.566369,  0.0715792
  0.509606,  0.0686083
  0.469037,  0.0655721
  0.434791,  0.0626527
  0.406651,  0.0599146
  0.379852,  0.0576226
  0.356276,  0.0545582
  0.334349,  0.0521161
   0.31384,  0.0491277
  0.294244,  0.0467003
  0.276363,  0.0438745
  0.258607,  0.0414091
  0.241557,  0.0385979
   0.22528,  0.0355393
  0.209261,  0.0329375
  0.193073,  0.0300367
   0.17745,  0.0271242
  0.161428,  0.0241299
  0.147043,    0.02127
  0.130778,  0.0183672
  0.116018,  0.0159603
  0.101197,  0.0129582
 0.0862538,   0.010334
  0.070637,  0.0078501
 0.0561679, 0.00468532
 0.0406641, 0.00243909
*Plastic
 0.287979,        0.
 0.600347, 0.0233561
  1.29385, 0.0586462
  4.61651,  0.156991
  52.3531,   1.56991
*amplitude,name=nominal_strain
0.0,0.0, 10.,0.1, 20.,0.025, 40.,0.3,
60.,0.07, 80.,1.0, 100.0,0.18
*STEP,NLGEOM,INC=2000
*STATIC
1.0,100.0,,1.
*BOUNDARY
nx0,1,1
ny0,2,2
nz0,3,3
*boundary, amplitude=nominal_strain
nx1,1,1,1.0
*output,field,freq=300
*node output
u
*output,history,freq=1
*node output,nset=nrf1
rf1
*node output,nset=nu1
u1
*END STEP
