*HEADING
Single element test for step11_relax_0050
*NODE
1, 0., 0., 0.
2, 1., 0., 0.
3, 1., 1., 0.
4, 0., 1., 0.
5, 0., 0., 1.
6, 1., 0., 1.
7, 1., 1., 1.
8, 0., 1., 1.
*ELEMENT, TYPE=C3D8H, ELSET=EA
1, 1, 2, 3, 4, 5, 6, 7, 8
*SOLID SECTION, ELSET=EA, MATERIAL=PRF_model
1.
*Material, name=PRF_model
*Hyperelastic,  NeoHooke,  Moduli=instantaneous
549.6, 0.0
*Viscoelastic, Nonlinear, NetworkId=1, SRatio=0.337060, Law=strain
4.8828e-7, 3.13398, -0.551660
*Viscoelastic, Nonlinear, NetworkId=2, SRatio=0.150654, Law=strain
2.4414e-6, 4.91992, -0.746191
*Viscoelastic, Nonlinear, NetworkId=3, SRatio=0.372607, Law=strain
7.81403e-5, 3.801953, -0.616699
*AMPLITUDE, NAME=AMP_STRAIN
0.000000e+00, 0.000000e+00, 1.440000e-01, 5.100130e-05, 2.860000e-01, 1.090059e-04, 4.260000e-01, 1.560122e-04
6.060000e-01, 2.190240e-04, 7.860000e-01, 2.780386e-04, 9.660000e-01, 3.480606e-04, 1.166000e+00, 4.100841e-04
1.366000e+00, 4.791147e-04, 1.566000e+00, 5.431475e-04, 1.766000e+00, 6.101861e-04, 1.966000e+00, 6.752279e-04
2.166000e+00, 7.472791e-04, 2.366000e+00, 8.083265e-04, 2.566000e+00, 8.813882e-04, 2.766000e+00, 9.454467e-04
2.966000e+00, 1.012512e-03, 3.166000e+00, 1.081584e-03, 3.366000e+00, 1.149660e-03, 3.566000e+00, 1.212735e-03
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3.213660e+02, 4.984381e-03, 3.223660e+02, 4.983376e-03, 3.233660e+02, 4.982371e-03
*STEP, INC=100000, NLGEOM=YES
*VISCO
0.323366, 323.366, 1e-15, 16.1683
*BOUNDARY
1, 1, 3
4, 1, 1
4, 3, 3
8, 1, 1
5, 1, 2
2, 2, 3
6, 2, 2
2, 3, 3
3, 3, 3
*BOUNDARY, AMPLITUDE=AMP_STRAIN
2, 1, 1, 1.0
3, 1, 1, 1.0
6, 1, 1, 1.0
7, 1, 1, 1.0
*OUTPUT, FIELD, FREQUENCY=1
*ELEMENT OUTPUT
S, LE
*OUTPUT, HISTORY, FREQUENCY=1
*ELEMENT OUTPUT, ELSET=EA
S11, LE11
*NODE PRINT, FREQUENCY=0
*EL PRINT, FREQUENCY=1
S11, LE11
*END STEP
